// SBML level 3 version 1

model antimony_repressilator()

  // Compartments:
  compartment default_compartment = 1;
  compartment cell = 1;

  // Species:
  species PX in default_compartment = 0;
  species PY in default_compartment = 0;
  species PZ in default_compartment = 0;  // uniprot:P03034
  species X in default_compartment = 0;
  species Y in default_compartment = 20;
  species Z in default_compartment = 0;

  // Parameters:
  eff = 20;
  n = 2;
  KM = 40;
  tau_mRNA = 2;
  tau_prot = 10;
  ps_a = 0.5;
  ps_0 = 0.0005;

  // Assignment rules:
  beta := tau_mRNA/tau_prot;
  alpha0 := a0_tr*eff*tau_prot/(ln(2)*KM);
  alpha := a_tr*eff*tau_prot/(ln(2)*KM);
  t_ave := tau_mRNA/ln(2);
  k_tl := eff/t_ave;
  a_tr := (ps_a - ps_0)*60;
  a0_tr := ps_0*60;
  kd_prot := ln(2)/tau_prot;
  kd_mRNA := ln(2)/tau_mRNA;

  // Reactions:
  _J0: X -> ; kd_mRNA*X;
  _J1: Y -> ; kd_mRNA*Y;
  _J2: Z -> ; kd_mRNA*Z;
  _J3: -> PX; k_tl*X;  // modifiers: X
  _J4: -> PY; k_tl*Y;  // modifiers: Y
  _J5: -> PZ; k_tl*Z;  // modifiers: Z
  _J6: PX -> ; kd_prot*PX;
  _J7: PY -> ; kd_prot*PY;
  _J8: PZ -> ; kd_prot*PZ;
  _J9: -> X; a0_tr + a_tr*KM^n/(KM^n + PZ^n);  // modifiers: PZ
  _J10: -> Y; a0_tr + a_tr*KM^n/(KM^n + PX^n);  // modifiers: PX
  _J11: -> Z; a0_tr + a_tr*KM^n/(KM^n + PY^n);  // modifiers: PY
end
